// COMSOL Multiphysics 4.4.0.150 model "v3.mph"
// Outline of the model tree

Geometry
  geom1 "Geometry 1" (2D, length unit cm)
    b1: BezierPolygon "Bézier Polygon 1" | p = {{0, 0}, {0, 1}}; degree = 1; w = {1, 1}; type = solid
    r1: Rectangle | pos = {0, 0.5}; type = solid; base = corner; size = {0.05, 0.5}
    r2: Rectangle | pos = {-5, -5}; type = solid; base = corner; size = {11, 10}
    b3: BezierPolygon "Bézier Polygon 3"
      p = {{0, -0.1, -0.1, 0}, {1, 1, 0, 0}}
      degree = {1, 1, 1}
      w = {1, 1, 1, 1, 1, 1}
      type = solid
    b4: BezierPolygon "Bézier Polygon 4"
      p = {{0.1, 0.1}, {-1.1999997679068, 2.3999998490016}}
      degree = 1
      w = {1, 1}
      type = solid
    fin: Finalize "Form Union"

Materials
  mat1 "Material 1" on domains 1, 2
    def "Basic"
      relpermittivity = 1
  mat2 "Material 2" on domains 2
    def "Basic"
      relpermittivity = 100
  mat3 "Material 3" on domains 3
    def "Basic"
      relpermittivity = 10000

Physics
  es: Electrostatics on all domains
    dependent variable V
    EquationForm.form = Stationary
    ccn1: ChargeConservation (default) | materialType = solid
    zc1: ZeroCharge (default)
    init1: init "Initial Values 1" (default)
    pot2: ElectricPotential on boundaries 12
    pot3: ElectricPotential on boundaries 7 | V0 = 1
    pot4: ElectricPotential on boundaries 4 | V0 = -1

Mesh
  mesh1 "Mesh 1"
    size: MeshSizeDefault | hnarrow = 10; hauto = 1
    ftri1: FreeTri "Free Triangular 1" on remaining entities
      xscale = 1
      yscale = 1
      smoothcontrol = on
      smoothmaxiter = 8
      smoothmaxdepth = 8

Studies
  std1 "Study 1"
    stat: Stationary

Solver configurations
  sol1 "Solver 1" (study std1)
    v1: Variables "Dependent Variables 1"
    s1: Stationary "Stationary Solver 1"
      dDef: Direct
      fc1: FullyCoupled | linsolver = dDef

Datasets
  dset1: Solution | solution = sol1

Derived values
  pev1: EvalPoint "Point Evaluation 1" | data = dset1; table = tbl4; expr = Vx

Tables
  tbl4: Table
    // Point Evaluation 1 (Vx)
    Gradient of V, x component (V/m), Point: 4 | Electric potential (V), Point: 4 | Gradient of V, y component (V/m), Point: 4 | Electric potential (V), Point: 4 | Gradient of V, x component (V/m), Point: 4
    -1279.97 | 0 | 508.087 | 0 | -1279.97

Plots
  pg1: PlotGroup2D "Electric Potential (es)" | data = dset1; inputmode = evaluate
    surf1: Surface | expr = V
  pg3: PlotGroup2D "2D Plot Group 3" | data = dset1
    arws1: ArrowSurface
      expr = {es.Ex, es.Ey}
      arrowxmethod = coord
      xnumber = 250
      xcoord = range(-0.16,0.02,0.25)
      arrowymethod = coord
      ynumber = 250
      ycoord = range(0.25,0.02,0.7)
      arrowlength = normalized
      col1: Color "Color Expression 1" | expr = sqrt(Vx^2+Vy^2); descr = |Electric field|
  pg6: PlotGroup2D "2D Plot Group 6" | data = dset1
    surf1: Surface | expr = sqrt(Vy^2+Vx^2)